// SBML level 3 version 1

model toy_top_level()
  // Top level model
  // Wholecell Toy Model
  // Description
  // This is a toy model for coupling models with different modeling frameworks via comp.
  // This file has been produced by Matthias Koenig.
  // Terms of use
  // Copyright © 2016 Wholecell Consortium.
  // Redistribution and use of any part of this model, with or without modification, are permitted provided that the following conditions are met:
  // Redistributions of this SBML file must retain the above copyright notice, this list of conditions and the following disclaimer.
  // Redistributions in a different form must reproduce the above copyright notice, this list of conditions and the following disclaimer in the documentation and/or other materials provided with the distribution.
  // This model is distributed in the hope that it will be useful, but WITHOUT ANY WARRANTY; without even the implied warranty of MERCHANTABILITY or FITNESS FOR A PARTICULAR PURPOSE.
  // model units - substance: item, time: s, volume: m3, area: m2, length: m, extent: item

  // Compartments:
  compartment extern = 1 m3; extern is "external compartment";
  compartment cell = 1 m3;
  compartment fba__membrane = 1 m2;  // 2-D

  // Species:
  substanceOnly species C in extern = 0;
  substanceOnly species $fba__A in extern = 10;
  substanceOnly species fba__B1 in cell = 0;
  substanceOnly species fba__B2 in cell = 0;
  substanceOnly species model__D in extern = 0;

  // Parameters:
  ub_R1 = 1 item_per_s;
  vR3 has item_per_s; vR3 is "vR3 (FBA flux)";
  bounds__k1 = -0.2 per_s;
  fba__lb = 0 item_per_s; fba__lb is "lower bound";
  fba__ub = 1000 item_per_s; fba__ub is "upper bound";
  model__k_R4 = 0.1 per_s;

  // Assignment rules:
  vR3 := B2_export_R3;

  // Rate rules:
  ub_R1' = bounds__k1*ub_R1;

  // Reactions:
  fba__R1: $fba__A -> fba__B1; ; fba__R1 is "A import (R1)";
  fba__R2: fba__B1 -> fba__B2; ; fba__R2 is "B1 <-> B2 (R2)";
  B2_export_R3: fba__B2 -> C; ; B2_export_R3 is "B2 export (R3)";
  update__R3: => C; vR3; update__R3 is "-> C";
  model__R4: C => model__D; model__k_R4*C; model__R4 is "C -> D";

  // Unit definitions:
  unit item_per_s = item / second;
  unit s = second;
  unit kg = kilogram;
  unit m3 = metre^3;
  unit m2 = metre^2;
  unit mM = mole / metre^3;
  unit item_per_m3 = item / metre^3;
  unit m = metre;
  unit per_s = 1 / second;
end
