// SBML level 3 version 1

model toy_fba()
  // FBA submodel

  // Compartments:
  compartment external compartment = 1 m3;
  compartment cell = 1 m3;

  // Species:
  substanceOnly species $A in extern = 10*extern;
  substanceOnly species $C in extern = 0;
  substanceOnly species B1 in cell = 0;
  substanceOnly species B2 in cell = 0;

  // Parameters:
  ub R1 = 1 items_per_s;
  lower bound has items_per_s;
  upper bound = 1000 items_per_s;
  R1 flux has items_per_s;
  R2 flux has items_per_s;
  R3 flux has items_per_s;

  // Reactions:
  A_import_R1: $A -> B1; v_R1; A_import_R1 is "A import (R1)";
  B1_B2_R2: B1 -> B2; v_R2; B1_B2_R2 is "B1 <-> B2 (R2)";
  B2_export_R3: B2 -> $C; v_R3; B2_export_R3 is "B2 export (R3)";
end
