// SBML level 3 version 1

model toy_ode_bounds(ub_R1)
  // ODE bound calculation submodel
  // Wholecell Toy Model
  // Description
  // This is a toy model for coupling models with different modeling frameworks via comp.
  // This file has been produced by Matthias Koenig.
  // Terms of use
  // Copyright © 2016 Wholecell Consortium.
  // Redistribution and use of any part of this model, with or without modification, are permitted provided that the following conditions are met:
  // Redistributions of this SBML file must retain the above copyright notice, this list of conditions and the following disclaimer.
  // Redistributions in a different form must reproduce the above copyright notice, this list of conditions and the following disclaimer in the documentation and/or other materials provided with the distribution.
  // This model is distributed in the hope that it will be useful, but WITHOUT ANY WARRANTY; without even the implied warranty of MERCHANTABILITY or FITNESS FOR A PARTICULAR PURPOSE.
  // model units - substance: item, time: s, volume: m3, area: m2, length: m, extent: item

  // Parameters:
  ub_R1 = 1 item_per_s; ub_R1 is "ub_r1";
  k1 = -0.2 per_s;

  // Rate rules:
  ub_R1' = k1*ub_R1;

  // Unit definitions:
  unit item_per_s = item / second;
  unit s = second;
  unit kg = kilogram;
  unit m3 = metre^3;
  unit m2 = metre^2;
  unit mM = mole / metre^3;
  unit item_per_m3 = item / metre^3;
  unit m = metre;
  unit per_s = 1 / second;
end
