// SBML level 3 version 1

model toy_ode_model(C, extern)
  // ODE/SSA submodel
  // Wholecell Toy Model
  // Description
  // This is a toy model for coupling models with different modeling frameworks via comp.
  // This file has been produced by Matthias Koenig.
  // Terms of use
  // Copyright © 2016 Wholecell Consortium.
  // Redistribution and use of any part of this model, with or without modification, are permitted provided that the following conditions are met:
  // Redistributions of this SBML file must retain the above copyright notice, this list of conditions and the following disclaimer.
  // Redistributions in a different form must reproduce the above copyright notice, this list of conditions and the following disclaimer in the documentation and/or other materials provided with the distribution.
  // This model is distributed in the hope that it will be useful, but WITHOUT ANY WARRANTY; without even the implied warranty of MERCHANTABILITY or FITNESS FOR A PARTICULAR PURPOSE.
  // model units - substance: item, time: s, volume: m3, area: m2, length: m, extent: item

  // Compartments:
  compartment extern = 1 m3; extern is "external compartment";

  // Species:
  substanceOnly species C in extern = 0;
  substanceOnly species D in extern = 0;

  // Parameters:
  k_R4 = 0.1 per_s;

  // Reactions:
  C_D: C => D; k_R4*C; C_D is "C -> D";

  // Unit definitions:
  unit item_per_s = item / second;
  unit s = second;
  unit kg = kilogram;
  unit m3 = metre^3;
  unit m2 = metre^2;
  unit mM = mole / metre^3;
  unit item_per_m3 = item / metre^3;
  unit m = metre;
  unit per_s = 1 / second;
end
