// SBML level 3 version 1

model toy_ode_update()
  // ODE metabolite update submodel
  // Wholecell Toy Model
  // Description
  // This is a toy model for coupling models with different modeling frameworks via comp.
  // This file has been produced by Matthias Koenig.
  // Terms of use
  // Copyright © 2015 Wholecell Consortium.
  // Redistribution and use of any part of this model, with or without modification, are permitted provided that the following conditions are met:
  // Redistributions of this SBML file must retain the above copyright notice, this list of conditions and the following disclaimer.
  // Redistributions in a different form must reproduce the above copyright notice, this list of conditions and the following disclaimer in the documentation and/or other materials provided with the distribution.
  // This model is distributed in the hope that it will be useful, but WITHOUT ANY WARRANTY; without even the implied warranty of MERCHANTABILITY or FITNESS FOR A PARTICULAR PURPOSE.
  // model units - substance: item, time: s, volume: m3, area: m2, length: m, extent: item

  // Compartments:
  compartment extern = 1 m3; extern is "external compartment";
  compartment cell = 1 m3;

  // Species:
  substanceOnly species A in extern = 10;
  substanceOnly species C in extern = 0;
  substanceOnly species B1 in cell = 0;
  substanceOnly species B2 in cell = 0;

  // Parameters:
  ub_R1 = 1 item_per_s;
  lb = 0 item_per_s; lb is "lower bound";
  ub = 1000 item_per_s; ub is "upper bound";
  v_R1 = 0 item_per_s; v_R1 is "R1 flux";
  v_R2 = 0 item_per_s; v_R2 is "R2 flux";
  v_R3 = 0 item_per_s; v_R3 is "R3 flux";

  // Reactions:
  A_import_R1: A -> B1; v_R1; A_import_R1 is "A import (R1)";
  B1_B2_R2: B1 -> B2; v_R2; B1_B2_R2 is "B1 <-> B2 (R2)";
  B2_export_R3: B2 -> C; v_R3; B2_export_R3 is "B2 export (R3)";

  // Unit definitions:
  unit item_per_s = item / second;
  unit s = second;
  unit kg = kilogram;
  unit m3 = metre^3;
  unit m2 = metre^2;
  unit mM = mole / metre^3;
  unit item_per_m3 = item / metre^3;
  unit m = metre;
  unit per_s = 1 / second;
end
