// SBML level 3 version 1

model toy_ode_comp()

  // Compartments:
  compartment extern = 1; extern is "external compartment";
  compartment submodel_update_cell = 1;

  // Species:
  species submodel_update_A in extern = 10/extern;
  species $C in extern = 0;
  species submodel_update_B1 in submodel_update_cell = 0;
  species submodel_update_B2 in submodel_update_cell = 0;
  species submodel_model_D in extern = 0;

  // Parameters:
  submodel_bounds_ub_R1 = 1; submodel_bounds_ub_R1 is "ub r1";
  submodel_bounds_k1 = -0.2;
  submodel_update_v_R1 = 0; submodel_update_v_R1 is "R1 flux";
  submodel_update_v_R2 = 0; submodel_update_v_R2 is "R2 flux";
  submodel_update_v_R3 = 0; submodel_update_v_R3 is "R3 flux";
  submodel_model_k_R4 = 0.1;

  // Rate rules:
  submodel_bounds_ub_R1' = submodel_bounds_k1*submodel_bounds_ub_R1;

  // Reactions:
  submodel_update_R1: submodel_update_A -> submodel_update_B1; submodel_update_v_R1; submodel_update_R1 is "A import (R1)";
  submodel_update_R2: submodel_update_B1 -> submodel_update_B2; submodel_update_v_R2; submodel_update_R2 is "B1 <-> B2 (R2)";
  submodel_update_R3: submodel_update_B2 -> $C; submodel_update_v_R3; submodel_update_R3 is "B2 export (R3)";
  submodel_model_R4: $C => submodel_model_D; submodel_model_k_R4*C; submodel_model_R4 is "C -> D";
end
